Wing
# AVL input file

# Mach
0.5

# iYsym iZsym Zsym
0 0 0
# Sref Cref Bref
4 1 4
# Xref Yref Zref
0 0 0

# ==========================================================
#                         WING
# ==========================================================
SURFACE
MainWing
# Nchord Cspace [ Nspan Sspace ]
8 1.0 14 0
# Wing is symmetrical to y=0
YDUPLICATE
0
INDEX
1
ANGLE
0
# ----------------------------------------------------------
SECTION
# Xle Yle Zle Chord Ainc
0 0 0 1 0
AFILE
AFsection1.dat
CLAF
1
# ----------------------------------------------------------
SECTION
# Xle Yle Zle Chord Ainc
1 1 1 1 0
AFILE
AFsection2.dat
CLAF
1
# ----------------------------------------------------------
SECTION
# Xle Yle Zle Chord Ainc
2 2 2 1 0
AFILE
AFsection3.dat
CLAF
1
